// COMSOL Multiphysics 6.4.0.280 model "electrodialysis.mph"
// Desalination in an Electrodialysis Cell
// This example treats the removal of sodium chloride from a water solution (diluate) into another stream (concentrate). Typical applications of electrodialysis can be found in desalination of process streams, food, and juice products, biomedical engineering, to mention a few.
// Outline of the model tree

Parameters
  Vtot = 1.5[V]  // Total potential drop over unit cell
  DNa = 2.5e-9[m^2/s]  // Diffusion coefficient, Na
  DCl = 2e-9[m^2/s]  // Diffusion coefficient, Cl
  T = 298.15[K]  // Temperature
  cCl_0 = 0.5[mol/dm^3]  // Inlet concentration, Cl
  cMem = 1[mol/dm^3]  // Membrane charge concentration
  v_avg = 0.005[m/s]  // Channel average flow velocity
  L = 0.01[m]  // Cell length
  W_ch = 1[mm]  // Channel width
  W_m = 0.25[mm]  // Membrane width

Functions
  an1: Analytic | funcname = vel; expr = 3*v_avg*(1-((t)/(W_ch/2))^2); args = t; fununit = m/s; argunit = m

Variables
  var1 "Variables 1" on domains 3
    vel = vel(x)  // Channel velocity (middle channel)
  var2 "Variables 2" on domains 1
    vel = vel((x+W_ch+W_m))  // Channel velocity (left channel)
  var3 "Variables 3" on domains 5
    vel = vel((x-W_ch-W_m))  // Channel velocity (right channel)

Selections
  sel1: Explicit "Membrane (Cation Selective)" on domains 2
  sel2: Explicit "Membrane (Anion Selective)" on domains 4
  sel3: Explicit "Channels" on domains 1, 3, 5
  sel4: Explicit "Inlets" on boundaries 2, 8, 14
  sel5: Explicit "Outlets" on boundaries 3, 9, 15

Geometry
  geom1 "Geometry 1" (2D, length unit m)
    r1: Rectangle | size = {2*(W_ch+W_m), L}; pos = {-(W_ch+W_m), 0}
    r2: Rectangle | size = {(W_ch+2*W_m), L}; pos = {-(W_ch+2*W_m)/2, 0}
    r3: Rectangle | size = {W_ch, L}; pos = {-W_ch/2, 0}
    fin: Finalize "Form Union"

Physics
  tcd: TertiaryCurrentDistributionNernstPlanck on all domains
    dependent variable cNa = {cNa, cCl}
    sp1: SpeciesProperties "Species Charges 1" (default) | z = {1, -1}
    ice1: Electrolyte (default)
      u = {0, vel, 0}
      DH = 9.3e-9[m^2/s]
      DOH = 5.3e-9[m^2/s]
      um = 
        {1e-13[s*mol/kg], 0, 0, 0, 1e-13[s*mol/kg], 0, 0, 0, 1e-13[s*mol/kg]}
        {1e-13[s*mol/kg], 0, 0, 0, 1e-13[s*mol/kg], 0, 0, 0, 1e-13[s*mol/kg]}
      umH = 3.8e-12[s*mol/kg]
      umOH = 2.2e-12[s*mol/kg]
      epsilonr = 80
      minput_stress = 0
      Dm_cNa = 1e-9[m^2/s]
      D_cNa = DNa
      Dchem_cNa = 1e-9[m^2/s]
      Dm_cCl = 1e-9[m^2/s]
      D_cCl = DCl
      Dchem_cCl = 1e-9[m^2/s]
    nflx1: NoFlux (default)
    ein1: ElectricInsulation "Insulation 1" (default)
    init1: init "Initial Values 1" (default) | initc = {0, cCl_0}; initphil = Vtot*x/L
    iem1: IonExchangeMembrane "Ion Exchange Membrane (Cation Selective)" on selection sel1
      rhofix = -cMem*F_const
      D_cNa = DNa
      D_cCl = DCl
      epsl = 0.15
    iem2: IonExchangeMembrane "Ion Exchange Membrane (Anion Selective)" on selection sel2
      rhofix = cMem*F_const
      D_cNa = DNa
      D_cCl = DCl
      epsl = 0.15
    pc1: PeriodicCondition on boundaries 1, 16
      deltaphil = -Vtot
      ApplyForElectrodePhase = 0
      destinationDomains: boundaries 16
    eip1: ElectrolytePotentialPoint "Electrolyte Potential 1" on points 1
    in1: Inflow on selection sel4 | c0 = {0, cCl_0}; BoundaryConditionType = FluxDanckwerts
    out1: Outflow on selection sel5

Mesh
  mesh1 "Mesh 1"
    size: MeshSizeDefault | hmax = 6.7E-4; hmin = 3.0E-6; hcurve = 0.3; hgrad = 1.3
    map1: Map "Mapped 1" on remaining entities
      dis1: Distribution on boundaries 1 | numelem = 100
      dis2: Distribution on boundaries 8, 9 | type = predefined; elemcount = 100; elemratio = 10; symmetric = on
      dis3: Distribution on boundaries 3, 14 | type = predefined; reverse = on; elemcount = 20; elemratio = 10
      dis4: Distribution on boundaries 2, 15 | type = predefined; elemcount = 20; elemratio = 10
      dis5: Distribution on boundaries 6, 12 | type = predefined; elemcount = 20; elemratio = 2; symmetric = on

Studies
  std1 "Study 1"
    stat: Stationary | usestol = on; stol = 1e-5

Solver configurations
  sol1 "Solution 1" (study std1)
    v1: Variables "Dependent Variables 1"
    s1: Stationary "Stationary Solver 1"
      fc1: FullyCoupled
      d1: Direct "Direct (tcd)"

Datasets
  dset1: Solution | solution = sol1
  cln1: CutLine2D | data = dset1; genpoints = {{-W_ch-W_m, L/2}, {W_ch+W_m, L/2}}

Plots
  pg1: PlotGroup2D "Electrolyte Potential (tcd)" | data = dset1
    surf1: Surface | expr = phil
    str1: Streamline | expr = {tcd.Ilx, tcd.Ily}; pointtype = arrow; arrowlength = logarithmic
  pg2: PlotGroup2D "Electrolyte Current Density (tcd)" | data = dset1
    str1: Streamline | expr = {tcd.Ilx, tcd.Ily}; pointtype = arrow; arrowlength = logarithmic
      col1: Color "Color Expression 1" | expr = root.comp1.tcd.IlMag
  pg3: PlotGroup2D "Concentration, Na (tcd)" on selection sel3 | data = dset1; solutionintitle = off
    surf1: Surface | expr = cNa
    str1: Streamline on selection sel4
      expr = {tcd.tflux_cNax, tcd.tflux_cNay}
      selnumber = 5
      pointtype = arrow
      arrowlength = logarithmic
  pg4: PlotGroup2D "Concentration, Cl (tcd)" | data = dset1
    surf1: Surface | expr = cCl
    str1: Streamline | expr = {tcd.tflux_cClx, tcd.tflux_cCly}; pointtype = arrow; arrowlength = logarithmic
  pg5: PlotGroup1D "Potential" | data = cln1; xlabel = Position
    lngr1: LineGraph | expr = phil
  pg6: PlotGroup1D "Concentrations" | data = cln1; xlabel = Position; ylabel = Concentration (mol/m<sup>3</sup>)
    lngr1: LineGraph | expr = cNa; legends = Na<sup>+</sup>
    lngr2: LineGraph | expr = cCl; legends = Cl<sup>-</sup>
  pg7: PlotGroup1D "Fluxes, Na" | data = cln1; xlabel = Position; ylabel = Flux
    lngr1: LineGraph | expr = tcd.tfluxx_cNa; legends = Total Flux
    lngr2: LineGraph | expr = tcd.mflux_cNax; legends = Migrative Flux
    lngr3: LineGraph | expr = tcd.dflux_cNax; legends = Diffusive Flux
  pg8: PlotGroup1D "Fluxes, Cl" | data = cln1; xlabel = Position; ylabel = Flux
    lngr1: LineGraph | expr = tcd.tfluxx_cCl; legends = Total Flux
    lngr2: LineGraph | expr = tcd.mflux_cClx; legends = Migrative Flux
    lngr3: LineGraph | expr = tcd.dflux_cClx; legends = Diffusive Flux
  pg9: PlotGroup1D "Electrolyte current density" | data = dset1
    lngr1: LineGraph on boundaries 10
      expr = tcd.nIl
      descr = Normal electrolyte current density
      xdata = expr
      xdataexpr = y